# Opg.1a
# 1)
v_0 == v_1 - v_2
v_1 == v_b*(R + R_d)/((R + R_d) + R) → v_1 == v_b*(R_d + R)/(R_d + 2*R)
v_2 == v_b*R/(R + R) → v_2 == v_b/2
# Strain gauge i hvile udgangspænding = 0v
# 2)
# Det er lineært, fordi det kun er en kvart bro.
# 3)
# 4) man har 2 variable størrelser, det vil give en dobbel så høj opløsning som kvartbroen.
